# LAMMPS input for melamine backmapping — bakery-faithful protocol,
# ported from examples/pet/large/in.pet (validated 2026-07-28, see
# research/checkpoints.md). Replaces the old two-script pipeline
# (in.melamine Phase1/2 + in.melamine_hybrid_tierc), which used a
# frozen-CG Phase 0 (`fix freeze cg_atoms setforce 0 0 0`, held for the
# entire run) and independent per-atom `velocity create` — both patterns
# research/decisions/2026-07-19-prefer-bakery-protocol-no-frozen-cg.md
# and the 2026-07-28 PET root-cause investigation found actively harmful.
#
# Structure (no Phase 0 minimize, continuous dt=1fs throughout):
#   Stage 1 — CG+AT equilibration at lambda=0.
#   Stage 2 — lambda ramp 0->1. fix backmap drives CG bead position via
#             its own COM-shift toward the AT center of mass.
#   Stage 3 — AT production at lambda=1. CG beads keep NO independent
#             integrator or thermostat; their motion comes entirely from
#             fix backmap's COM-tracking, exactly as in the PET checkpoint.
#
# Force field (pair/bond/angle/dihedral_coeff below) is copied verbatim
# from the current backmap-prep output (examples/melamine/large/in.melamine,
# regenerated after the GROMACS k->k/2 harmonic fix and the forcefield_dir
# wiring that resolved 12 previously-missing amide/imide dihedrals -- see
# research/decisions/2026-07-21-at-harmonic-k-half-for-epplus-parity.md).
# No CapForce/SHAKE: melamine's pair_style has no ecap variant and its
# original scripts never used SHAKE, so neither is introduced here.
#
# Usage:
#   lmp -in in.melamine_bakery_faithful.lammps \
#     -var eq_steps 10000 -var ramp_steps 10000 -var prod_steps 500000

variable eq_steps   index 2000
variable ramp_steps index 5000
variable prod_steps index 20000

units real
atom_style full
boundary p p p

read_data melamine.data
reset_atoms image all

comm_modify cutoff 15.00

pair_style backmap 14.00 lj/cut/coul/cut 14.00 9.00 14.00 table linear 1000
pair_coeff 1 1 cg table_A_A.table ENTRY
pair_coeff 1 2 none
pair_coeff 1 3 none
pair_coeff 1 4 none
pair_coeff 1 5 none
pair_coeff 1 6 none
pair_coeff 1 7 none
pair_coeff 1 8 none
pair_coeff 1 9 none
pair_coeff 2 2 atomistic 0.170000 3.250000
pair_coeff 2 3 atomistic 0.109087 3.400000
pair_coeff 2 4 atomistic 0.170000 3.250000
pair_coeff 2 5 atomistic 0.105924 3.375000
pair_coeff 2 6 atomistic 0.000000 0.000000
pair_coeff 2 7 atomistic 0.170000 3.185000
pair_coeff 2 8 atomistic 0.071414 2.875000
pair_coeff 2 9 atomistic 0.000000 0.000000
pair_coeff 3 3 atomistic 0.070000 3.550000
pair_coeff 3 4 atomistic 0.109087 3.400000
pair_coeff 3 5 atomistic 0.067970 3.525000
pair_coeff 3 6 atomistic 0.000000 0.000000
pair_coeff 3 7 atomistic 0.109087 3.335000
pair_coeff 3 8 atomistic 0.045826 3.025000
pair_coeff 3 9 atomistic 0.000000 0.000000
pair_coeff 4 4 atomistic 0.170000 3.250000
pair_coeff 4 5 atomistic 0.105924 3.375000
pair_coeff 4 6 atomistic 0.000000 0.000000
pair_coeff 4 7 atomistic 0.170000 3.185000
pair_coeff 4 8 atomistic 0.071414 2.875000
pair_coeff 4 9 atomistic 0.000000 0.000000
pair_coeff 5 5 atomistic 0.065999 3.500000
pair_coeff 5 6 atomistic 0.000000 0.000000
pair_coeff 5 7 atomistic 0.105924 3.310000
pair_coeff 5 8 atomistic 0.044497 3.000000
pair_coeff 5 9 atomistic 0.000000 0.000000
pair_coeff 6 6 atomistic 0.000000 0.000000
pair_coeff 6 7 atomistic 0.000000 0.000000
pair_coeff 6 8 atomistic 0.000000 0.000000
pair_coeff 6 9 atomistic 0.000000 0.000000
pair_coeff 7 7 atomistic 0.170000 3.120000
pair_coeff 7 8 atomistic 0.071414 2.810000
pair_coeff 7 9 atomistic 0.000000 0.000000
pair_coeff 8 8 atomistic 0.030000 2.500000
pair_coeff 8 9 atomistic 0.000000 0.000000
pair_coeff 9 9 atomistic 0.000000 0.000000

bond_style hybrid harmonic backmap/harmonic backmap/table linear 1000
bond_coeff 1 harmonic 481.000531 1.350000
bond_coeff 2 harmonic 481.000531 1.370000
bond_coeff 3 harmonic 382.000422 1.470000
bond_coeff 4 harmonic 434.000479 1.010000
bond_coeff 5 harmonic 320.000353 1.430000
bond_coeff 6 harmonic 340.000375 1.100000
bond_coeff 7 harmonic 553.000611 0.980000
bond_coeff 8 harmonic 553.000611 0.970000
bond_coeff 9 backmap/table cg table_b1.table ENTRY
bond_coeff 10 backmap/harmonic at 481.000531 1.350000
bond_coeff 11 backmap/harmonic at 481.000531 1.360000

angle_style hybrid harmonic backmap/harmonic
angle_coeff 1 harmonic 80.000088 115.9740
angle_coeff 2 harmonic 50.000055 122.7480
angle_coeff 3 harmonic 35.000039 117.1410
angle_coeff 4 harmonic 80.000088 112.2030
angle_coeff 5 harmonic 35.000039 109.7990
angle_coeff 6 harmonic 35.000039 110.3940
angle_coeff 7 harmonic 80.000088 116.1820
angle_coeff 8 harmonic 50.000055 123.0140
angle_coeff 9 harmonic 35.000039 117.6650
angle_coeff 10 harmonic 80.000088 112.1460
angle_coeff 11 harmonic 35.000039 110.3040
angle_coeff 12 harmonic 35.000039 109.9090
angle_coeff 13 harmonic 80.000088 118.7940
angle_coeff 14 harmonic 50.000055 123.0660
angle_coeff 15 harmonic 35.000039 117.2970
angle_coeff 16 harmonic 80.000088 112.5740
angle_coeff 17 harmonic 35.000039 109.7450
angle_coeff 18 harmonic 35.000039 110.2540
angle_coeff 19 harmonic 35.000039 116.4310
angle_coeff 20 harmonic 55.000061 107.8310
angle_coeff 21 harmonic 35.000039 107.8120
angle_coeff 22 harmonic 35.000039 108.1410
angle_coeff 23 harmonic 33.000036 108.3770
angle_coeff 24 harmonic 35.000039 116.7990
angle_coeff 25 harmonic 55.000061 108.8060
angle_coeff 26 harmonic 35.000039 107.8650
angle_coeff 27 harmonic 35.000039 107.9800
angle_coeff 28 harmonic 33.000036 108.2970
angle_coeff 29 harmonic 35.000039 116.9500
angle_coeff 30 harmonic 55.000061 107.5770
angle_coeff 31 harmonic 35.000039 108.1470
angle_coeff 32 harmonic 35.000039 107.7610
angle_coeff 33 harmonic 33.000036 108.4640
angle_coeff 34 backmap/harmonic at 80.000088 125.0100
angle_coeff 35 backmap/harmonic at 80.000088 116.1640
angle_coeff 36 backmap/harmonic at 80.000088 125.2370
angle_coeff 37 backmap/harmonic at 40.000044 114.8430
angle_coeff 38 backmap/harmonic at 40.000044 114.8070
angle_coeff 39 backmap/harmonic at 80.000088 118.7880
angle_coeff 40 backmap/harmonic at 80.000088 124.9860
angle_coeff 41 backmap/harmonic at 40.000044 115.1170
angle_coeff 42 backmap/harmonic at 80.000088 118.8230

dihedral_style hybrid ryckaert backmap/ryckaert
dihedral_coeff 1 ryckaert 7.936008 -0.000000 -7.936008 -0.000000 0.000000 -0.000000
dihedral_coeff 2 ryckaert 4.900005 -0.000000 -4.900005 -0.000000 0.000000 -0.000000
dihedral_coeff 3 ryckaert 6.089008 -0.000000 -6.089008 -0.000000 0.000000 -0.000000
dihedral_coeff 4 ryckaert 0.280000 -0.840001 0.000000 1.120001 0.000000 -0.000000
dihedral_coeff 5 ryckaert 0.200000 -0.600001 0.000000 0.800001 0.000000 -0.000000
dihedral_coeff 6 ryckaert 4.000004 -1.000001 -5.000006 -0.000000 0.000000 -0.000000
dihedral_coeff 7 ryckaert 0.225000 -0.675001 0.000000 0.900001 0.000000 -0.000000
dihedral_coeff 8 backmap/ryckaert at 0.717018 -7.239009 -1.150001 6.089008 0.000000 -0.000000
dihedral_coeff 9 backmap/ryckaert at 0.717018 -7.936008 0.000000 7.936008 0.000000 -0.000000
dihedral_coeff 10 backmap/ryckaert at 0.717018 -4.900005 0.000000 4.900005 0.000000 -0.000000

special_bonds lj 0.0 0.0 0.0 coul 0.0 0.0 0.0

group at_atoms type 2 3 4 5 6 7 8 9
group cg_atoms type 1

neigh_modify delay 0 every 1 check yes

# Bakery velocity: one Maxwell-Boltzmann draw per bead, shared by CG+AT
# (regenerate with melamine_bakery_velocities.py melamine.data melamine_vel.bakery.dump)
read_dump melamine_vel.bakery.dump 0 vx vy vz box no replace yes format native

fix integrate_at at_atoms nve
fix therm_at at_atoms langevin 300.0 300.0 33.3 12345

fix bm all backmap cg_type 1 alpha 0.0001 lambda0 0.0 nonuniform no
fix_modify bm active no

compute at_temp at_atoms temp
compute cg_temp cg_atoms temp

thermo 5
thermo_style custom step temp c_at_temp c_cg_temp pe epair ebond eangle edihed f_bm
thermo_modify colname f_bm lambda
thermo_modify temp at_temp
thermo_modify lost ignore

dump traj at_atoms custom 1000 dump.at_prod id mol type x y z
dump_modify traj sort id

timestep 1.00

# --- Stage 1: lambda=0 equilibration (no Phase 0 minimize) ---
run ${eq_steps}
print "EQ done step=$(step) T=$(c_at_temp) Ebond=$(ebond) Eangle=$(eangle)"

# --- Stage 2: lambda ramp 0 -> 1 (continuous, no frozen-CG break) ---
fix_modify bm active yes
run ${ramp_steps}
print "RAMP done step=$(step) T=$(c_at_temp) lambda=$(f_bm) Ebond=$(ebond) Eangle=$(eangle)"

# --- Stage 3: lambda=1 production ---
run ${prod_steps}
print "PRODUCTION done step=$(step) T=$(c_at_temp) lambda=$(f_bm) Ebond=$(ebond) Eangle=$(eangle)"

write_data melamine_hybrid_final.data
