# LAMMPS input for backmapping — generated by backmap-prep
# Reference: Krajniak et al., JCTC 2016, DOI: 10.1021/acs.jctc.6b00595
#            Krajniak, Zhang et al., JCC 2018, DOI: 10.1002/jcc.25129

units real
atom_style full
boundary p p p

read_data melamine_network.data

reset_atoms image all

comm_modify cutoff 90.66

pair_style backmap 12.00 lj/cut/coul/cut 12.00 9.00 14.00 table linear 1000
pair_coeff 1 1 cg table_A_A.table ENTRY
pair_coeff 1 2 none
pair_coeff 1 3 none
pair_coeff 1 4 none
pair_coeff 1 5 none
pair_coeff 1 6 none
pair_coeff 1 7 none
pair_coeff 1 8 none
pair_coeff 1 9 none
pair_coeff 2 2 atomistic 0.170000 3.300000
pair_coeff 2 3 atomistic 0.109087 3.425000
pair_coeff 2 4 atomistic 0.170000 3.300000
pair_coeff 2 5 atomistic 0.105925 3.400000
pair_coeff 2 6 atomistic 0.170000 3.210000
pair_coeff 2 7 atomistic 0.071414 2.900000
pair_coeff 2 8 atomistic 0.000000 0.000000
pair_coeff 2 9 atomistic 0.000000 0.000000
pair_coeff 3 3 atomistic 0.070000 3.550000
pair_coeff 3 4 atomistic 0.109087 3.425000
pair_coeff 3 5 atomistic 0.067971 3.525000
pair_coeff 3 6 atomistic 0.109087 3.335000
pair_coeff 3 7 atomistic 0.045826 3.025000
pair_coeff 3 8 atomistic 0.000000 0.000000
pair_coeff 3 9 atomistic 0.000000 0.000000
pair_coeff 4 4 atomistic 0.170000 3.300000
pair_coeff 4 5 atomistic 0.105925 3.400000
pair_coeff 4 6 atomistic 0.170000 3.210000
pair_coeff 4 7 atomistic 0.071414 2.900000
pair_coeff 4 8 atomistic 0.000000 0.000000
pair_coeff 4 9 atomistic 0.000000 0.000000
pair_coeff 5 5 atomistic 0.066000 3.500000
pair_coeff 5 6 atomistic 0.105925 3.310000
pair_coeff 5 7 atomistic 0.044497 3.000000
pair_coeff 5 8 atomistic 0.000000 0.000000
pair_coeff 5 9 atomistic 0.000000 0.000000
pair_coeff 6 6 atomistic 0.170000 3.120000
pair_coeff 6 7 atomistic 0.071414 2.810000
pair_coeff 6 8 atomistic 0.000000 0.000000
pair_coeff 6 9 atomistic 0.000000 0.000000
pair_coeff 7 7 atomistic 0.030000 2.500000
pair_coeff 7 8 atomistic 0.000000 0.000000
pair_coeff 7 9 atomistic 0.000000 0.000000
pair_coeff 8 8 atomistic 0.000000 0.000000
pair_coeff 8 9 atomistic 0.000000 0.000000
pair_coeff 9 9 atomistic 0.000000 0.000000

bond_style hybrid backmap/harmonic backmap/table linear 1000
bond_coeff 1 backmap/harmonic at 481.000531 1.350000
bond_coeff 2 backmap/harmonic at 481.000531 1.370000
bond_coeff 3 backmap/harmonic at 382.000422 1.470000
bond_coeff 4 backmap/harmonic at 434.000479 1.010000
bond_coeff 5 backmap/harmonic at 320.000353 1.430000
bond_coeff 6 backmap/harmonic at 340.000375 1.100000
bond_coeff 7 backmap/harmonic at 553.000611 0.980000
bond_coeff 8 backmap/harmonic at 553.000611 0.970000
bond_coeff 9 backmap/table cg table_b1.table ENTRY
bond_coeff 10 backmap/table cg None None
bond_coeff 11 backmap/harmonic at 481.000531 1.360000

angle_style backmap/harmonic
angle_coeff 1 at 80.000088 115.9740
angle_coeff 2 at 50.000055 122.7480
angle_coeff 3 at 35.000039 117.1410
angle_coeff 4 at 80.000088 112.2030
angle_coeff 5 at 35.000039 109.7990
angle_coeff 6 at 35.000039 110.3940
angle_coeff 7 at 35.000039 116.4310
angle_coeff 8 at 35.000039 107.8120
angle_coeff 9 at 35.000039 108.1410
angle_coeff 10 at 33.000036 108.3770
angle_coeff 11 at 80.000088 116.1820
angle_coeff 12 at 50.000055 123.0140
angle_coeff 13 at 35.000039 117.6650
angle_coeff 14 at 80.000088 112.1460
angle_coeff 15 at 35.000039 110.3040
angle_coeff 16 at 35.000039 109.9090
angle_coeff 17 at 35.000039 116.9500
angle_coeff 18 at 35.000039 108.1470
angle_coeff 19 at 35.000039 107.7610
angle_coeff 20 at 33.000036 108.4640
angle_coeff 21 at 80.000088 118.7940
angle_coeff 22 at 50.000055 123.0660
angle_coeff 23 at 35.000039 117.2970
angle_coeff 24 at 80.000088 112.5740
angle_coeff 25 at 35.000039 109.7450
angle_coeff 26 at 35.000039 110.2540
angle_coeff 27 at 35.000039 116.7990
angle_coeff 28 at 35.000039 107.8650
angle_coeff 29 at 35.000039 107.9800
angle_coeff 30 at 33.000036 108.2970
angle_coeff 31 at 55.000061 107.5770
angle_coeff 32 at 55.000061 108.8060
angle_coeff 33 at 55.000061 107.8310
angle_coeff 34 at 80.000088 125.2370
angle_coeff 35 at 80.000088 125.0100
angle_coeff 36 at 80.000088 116.1640
angle_coeff 37 at 40.000044 114.8070
angle_coeff 38 at 40.000044 114.8430
angle_coeff 39 at 80.000088 118.7880
angle_coeff 40 at 50.000055 109.5000
angle_coeff 41 at 35.000039 109.5000
angle_coeff 42 at 80.000088 124.9860
angle_coeff 43 at 40.000044 115.1170
angle_coeff 44 at 80.000088 118.8230
angle_coeff 45 at 60.000066 109.5000

dihedral_style hybrid ryckaert backmap/ryckaert
dihedral_coeff 1 ryckaert 7.936008 -0.000000 -7.936008 -0.000000 0.000000 -0.000000
dihedral_coeff 2 ryckaert 4.900005 -0.000000 -4.900005 -0.000000 0.000000 -0.000000
dihedral_coeff 3 ryckaert 6.089008 -0.000000 -6.089008 -0.000000 0.000000 -0.000000
dihedral_coeff 4 ryckaert 0.280000 -0.840001 0.000000 1.120001 0.000000 -0.000000
dihedral_coeff 5 ryckaert 0.200000 -0.600001 0.000000 0.800001 0.000000 -0.000000
dihedral_coeff 6 ryckaert 4.000004 -1.000001 -5.000006 -0.000000 0.000000 -0.000000
dihedral_coeff 7 ryckaert 0.225000 -0.675001 0.000000 0.900001 0.000000 -0.000000
dihedral_coeff 8 backmap/ryckaert at 7.239009 1.150001 -6.089008 -0.000000 0.000000 -0.000000
dihedral_coeff 9 backmap/ryckaert at 7.936008 -0.000000 -7.936008 -0.000000 0.000000 -0.000000
dihedral_coeff 10 backmap/ryckaert at 4.900005 -0.000000 -4.900005 -0.000000 0.000000 -0.000000
dihedral_coeff 11 backmap/ryckaert at 0.380000 -1.140001 0.000000 1.520002 0.000000 -0.000000
dihedral_coeff 12 backmap/ryckaert at 0.427500 -0.834499 0.128000 1.390002 0.000000 -0.000000
dihedral_coeff 13 backmap/ryckaert at -0.303000 -0.722001 0.417001 0.836000 0.000000 -0.000000

special_bonds lj 0.0 0.0 0.0 coul 0.0 0.0 0.0

group at_atoms type 2 3 4 5 6 7 8 9
group cg_atoms type 1

neigh_modify delay 0 every 1 check yes

# Initial velocities at T=300.0 K
velocity all create 300.0 48279 dist gaussian mom yes rot yes

fix integrate at_atoms nve
fix thermo at_atoms langevin 300.0 300.0 2000.0 48279

fix bm all backmap cg_type 1 alpha 0.001 lambda0 0.0 nonuniform no

fix pairs all backmap/pairs at file pairs.dat cut 12.000000

compute at_temp at_atoms temp

timestep 1.00

thermo 1000
thermo_style custom step temp pe ke etotal press f_bm
thermo_modify colname f_bm lambda
thermo_modify temp at_temp

dump traj all custom 1000 dump.backmap id mol type x y z f_bm
dump_modify traj sort id

# Backmapping: λ 0 → 1
fix_modify bm active yes
run 1000

write_data melamine_network_hybrid.data
