# PE MPI parity + benchmark: minimize + 5 ramp steps (parity) / 500 (bench).
# Same FF as in.pe_robust. comm_modify cutoff 15 A (linear melt).

units real
atom_style full
boundary p p p

read_data pe.data

comm_modify cutoff 15.00

pair_style backmap 14.00 lj/cut/coul/cut 14.00 9.00 14.00 table linear 1000
pair_coeff 1 1 cg table_A_A.table ENTRY
pair_coeff 1 2 cg table_A_B.table ENTRY
pair_coeff 1 3 none
pair_coeff 1 4 none
pair_coeff 2 2 cg table_B_B.table ENTRY
pair_coeff 2 3 none
pair_coeff 2 4 none
pair_coeff 3 3 atomistic 0.207266 3.748000
pair_coeff 3 4 atomistic 0.156387 3.826500
pair_coeff 4 4 atomistic 0.117997 3.905000

bond_style hybrid harmonic backmap/harmonic backmap/table linear 1000
bond_coeff 1 harmonic 633.365900 1.530000
bond_coeff 2 backmap/table cg table_b2.table ENTRY
bond_coeff 3 backmap/table cg table_b1.table ENTRY
bond_coeff 4 backmap/harmonic at 633.365900 1.530000

angle_style hybrid backmap/harmonic backmap/table linear 1000
angle_coeff 1 backmap/table cg table_a1.table ENTRY
angle_coeff 2 backmap/table cg table_a2.table ENTRY
angle_coeff 3 backmap/harmonic at 124.283120 111.0000

dihedral_style hybrid backmap/ryckaert backmap/table linear 1000
dihedral_coeff 1 backmap/table cg table_d1.table ENTRY
dihedral_coeff 2 backmap/ryckaert at 0.717018 -2.217713 2.905285 3.135783 -0.731287 -6.271589

special_bonds lj 0.0 0.0 0.0 coul 0.0 0.0 0.0

group at_atoms type 3 4
group cg_atoms type 1 2
neigh_modify delay 0 every 1 check yes

fix bm all backmap cg_type 1 2 alpha 0.0002 lambda0 0.0 nonuniform no

compute at_temp at_atoms temp
thermo 100
thermo_style custom step temp pe ke etotal press f_bm
thermo_modify colname f_bm lambda
thermo_modify temp at_temp

# Minimize AT overlaps (CG frozen)
fix freeze cg_atoms setforce 0.0 0.0 0.0
minimize 1.0e-4 1.0e-6 200 2000
unfix freeze

# Timed ramp block (NSTEPS via -var on command line; default 500)
fix limit_all all nve/limit 0.05
fix_modify bm active yes
timestep 0.10
run ${NSTEPS}

write_data pe_bench.data
print "pe bench run complete"
